*Heading
** Job name: Job-DCBAS4PEEKp1 Model name: Model-1
** Generated by: Abaqus/CAE 2020
*Preprint, echo=NO, model=NO, history=NO, contact=NO
**
** PARTS
**
*Part, name=AS4PEEK
*End Part
**
**
** ASSEMBLY
**
*Assembly, name=Assembly
**
*Instance, name=AS4PEEK-1, part=AS4PEEK
*Node
      1,         102.,   1.56500006
      2,         102.,   3.11999989
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***************************************************************
** Defining UEL(U1) - regular finite element
** Number of nodes: 4
** Properties: 	Thickness of plate 	( THICK )
**		Elastic modulus   	( Ex )
**		Elastic modulus   	( Ey )
**		   	( G )
**		Poisson ratio            ( NU )
** Coordinates: x, y
*User element, nodes=4, type=U1, properties=9, coordinates=2
1,2
***************************************************************
*Element, type=U1
    1,     1,    12,  4145,  1749
    2,    12,    13,  4146,  4145
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*Element, type=CPE4
1000001,     1,    12,  4145,  1749
1000002,    12,    13,  4146,  4145
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*Nset, nset=AS4, generate
     1,  34714,      1
*Elset, elset=U1, generate
     1,  32640,      1
*Nset, nset=PEEK
    1,    5,    7,    8, 1060, 1061
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*Elset, elset=U2, generate
 32641,  33331,      1
 *Elset, elset=elDummy ,generate
1000001, 1033331, 1
 *Uel property, elset=U1
122700.,10100.,5500, 0.25,1,   1e-07, 33331, 4, 3
*Uel property, elset=U2
4100.,4100.,1511.8, 0.356,1,   1e-07, 33331, 4, 3
*Solid section, elset=elDummy, material=Dummy
*End Instance
**
*Nset, nset=DOWN, instance=AS4PEEK-1
 10,
*Nset, nset=UP, instance=AS4PEEK-1
 4,
*End Assembly
*Material, name=Dummy
*Elastic
1.e-20
*User output variables
6
** ----------------------------------------------------------------
**
** STEP: Step-1
**
*Step, name=Step-1, nlgeom=NO
*Static
1., 1., 1e-05, 1.
**
** BOUNDARY CONDITIONS
**
** Name: BC-1 Type: 位移/转角
*Boundary
UP, 1, 1
UP, 2, 2, 1.
** Name: BC-2 Type: 位移/转角
*Boundary
DOWN, 1, 1
DOWN, 2, 2, -1.
**
** OUTPUT REQUESTS
**
*Restart, write, frequency=0
**
** FIELD OUTPUT: F-Output-1
**
*Output, field
*node output
U,RF
**
** specify the user-defined output for the dummy element set
*element output, elset=AS4PEEK-1.elDummy

uvarm,E,S
**
** HISTORY OUTPUT: H-Output-1
**
*Output, history, variable=PRESELECT
*End Step
